<?xml version="1.0"?>
<?xml-stylesheet type="text/xsl" href="http://jsbsim.sourceforge.net/JSBSim.xsl"?>
<fdm_config name="L1011-500" version="2.0" release="ALPHA"
   xmlns:xsi="http://www.w3.org/2001/XMLSchema-instance"
   xsi:noNamespaceSchemaLocation="http://jsbsim.sourceforge.net/JSBSim.xsd">

 <fileheader>
  <author> Aeromatic v 0.9 </author>
  <filecreationdate> 2009-02-26 </filecreationdate>
  <version>$Revison: $</version>
  <description> Models a L1011-500. </description>
 </fileheader>

<!--
  File:     L1011-500.xml
  Inputs:
    name:          L1011-500
    type:          three-engine transonic transport
    max weight:    496000 lb
    wing span:     164.35 ft
    length:        164.35 ft
    wing area:     3539.5 sq-ft
    gear type:     tricycle
    retractable?:  yes
    # engines:     3
    engine type:   turbine
    engine layout: wings and tail
    yaw damper?    yes
  Outputs:
    wing loading:  140.13 lb/sq-ft
    CL-alpha:      4.4 per radian
    CL-0:          0.2
    CL-max:        1.2
    CD-0:          0.019
    K:             0.042

-->

 <metrics>
   <wingarea  unit="FT2"> 4061.50 </wingarea>
   <wingspan  unit="FT" >  164.35 </wingspan>
   <wing_incidence>          2.80 </wing_incidence>
   <chord     unit="FT" >   21.54 </chord>
   <htailarea unit="FT2"> 1282.00 </htailarea>
   <htailarm  unit="FT" >   82.80 </htailarm>
   <vtailarea unit="FT2">  707.90 </vtailarea>
   <vtailarm  unit="FT" >   82.96 </vtailarm>
   <location name="AERORP" unit="M">
     <x>   -0.30</x>
     <y>   0.00 </y>
     <z>   -0.51 </z>
   </location>
   <location name="EYEPOINT" unit="IN">
     <x> 138.05 </x>
     <y> -30.00 </y>
     <z>  75.00 </z>
   </location>
   <location name="VRP" unit="IN">
     <x>0</x>
     <y>0</y>
     <z>0</z>
   </location>
 </metrics>

 <mass_balance>
   <ixx unit="SLUG*FT2">  5900646 </ixx>
   <iyy unit="SLUG*FT2">  11288379 </iyy>
   <izz unit="SLUG*FT2">  18786442 </izz>
   <emptywt unit="LBS" >    282749 </emptywt>
   <location name="CG" unit="M">
     <x>   0.0 </x>
     <y>   0.00 </y>
     <z> -1.0 </z>
   </location>

  <pointmass name="Crew" >
      <weight unit="LBS"> 0 </weight>
      <location name="POINTMASS" unit = "M">
        <x> -23.1650 </x>
        <y>  0.00 </y>
        <z> 1.310 </z>
      </location>
    </pointmass>

    <pointmass name="Cargo_1" >
      <weight unit="LBS"> 0 </weight>
      <location name="POINTMASS" unit = "M">
        <x>  -2.4 </x>
        <y>  0.00 </y>
        <z> 1.10 </z>
      </location>
    </pointmass>

   <pointmass name="Cargo_2" >
      <weight unit="LBS"> 0 </weight>
      <location name="POINTMASS" unit = "M">
        <x>  -0.79 </x>
        <y>  0.00 </y>
        <z> -2.49 </z>
      </location>
    </pointmass>

 </mass_balance>

 <ground_reactions>

  <contact type="BOGEY" name="NOSE">
   <location unit="M">
     <x> -15.9033 </x>
     <y>    0.000 </y>
     <z> -3.972 </z>
   </location>
   <static_friction>  0.70 </static_friction>
   <dynamic_friction> 0.99 </dynamic_friction>
   <rolling_friction> 0.02 </rolling_friction>
   <spring_coeff unit="LBS/FT">      148800.00 </spring_coeff>
   <damping_coeff unit="LBS/FT/SEC"> 49600.00 </damping_coeff>
   <max_steer unit="DEG"> 60.00 </max_steer>
   <brake_group>NONE</brake_group>
   <retractable>1</retractable>
 </contact>

  <contact type="BOGEY" name="LEFT_MAIN">
   <location unit="M">
     <x> 1.97 </x>
     <y>-4.778 </y>
     <z>-3.897 </z>
   </location>
   <static_friction>  0.60 </static_friction>
   <dynamic_friction> 0.90 </dynamic_friction>
   <rolling_friction> 0.02 </rolling_friction>
   <spring_coeff unit="LBS/FT">      496000.00 </spring_coeff>
   <damping_coeff unit="LBS/FT/SEC"> 99200.00 </damping_coeff>
   <max_steer unit="DEG">0</max_steer>
   <brake_group>LEFT</brake_group>
   <retractable>1</retractable>
 </contact>

  <contact type="BOGEY" name="RIGHT_MAIN">
   <location unit="M">
     <x> 1.97 </x>
     <y> 4.778 </y>
     <z>-3.897 </z>
   </location>
   <static_friction>  0.60 </static_friction>
   <dynamic_friction> 0.90 </dynamic_friction>
   <rolling_friction> 0.02 </rolling_friction>
   <spring_coeff unit="LBS/FT">      496000.00 </spring_coeff>
   <damping_coeff unit="LBS/FT/SEC"> 99200.00 </damping_coeff>
   <max_steer unit="DEG">0</max_steer>
   <brake_group>RIGHT</brake_group>
   <retractable>1</retractable>
 </contact>

  <contact type="STRUCTURE" name="LEFT_WING">
    <location unit="M">
     <x>  15.57 </x>
     <y> -23.457 </y>
     <z>   1.756 </z>
    </location>
    <static_friction>  0.80 </static_friction>
    <dynamic_friction> 0.50 </dynamic_friction>
    <spring_coeff unit="LBS/FT">      496000.00 </spring_coeff>
    <damping_coeff unit="LBS/FT/SEC"> 99200.00 </damping_coeff>
 </contact>

  <contact type="STRUCTURE" name="RIGHT_WING">
    <location unit="M">
     <x>  15.57 </x>
     <y>  23.457 </y>
     <z>   1.756 </z>
    </location>
    <static_friction>  0.80 </static_friction>
    <dynamic_friction> 0.50 </dynamic_friction>
    <spring_coeff unit="LBS/FT">      496000.00 </spring_coeff>
    <damping_coeff unit="LBS/FT/SEC"> 99200.00 </damping_coeff>
 </contact>

  <contact type="STRUCTURE" name="LEFT_ENGINE">
    <location unit="M">
     <x>  -1.427 </x>
     <y>  -9.883 </y>
     <z> -2.474 </z>
    </location>
    <static_friction>  0.80 </static_friction>
    <dynamic_friction> 0.50 </dynamic_friction>
    <spring_coeff unit="LBS/FT">      496000.00 </spring_coeff>
    <damping_coeff unit="LBS/FT/SEC"> 99200.00 </damping_coeff>
 </contact>

  <contact type="STRUCTURE" name="RIGHT_ENGINE">
    <location unit="M">
     <x>  -1.427 </x>
     <y>  9.883 </y>
     <z> -2.474 </z>
    </location>
    <static_friction>  0.80 </static_friction>
    <dynamic_friction> 0.50 </dynamic_friction>
    <spring_coeff unit="LBS/FT">      496000.00 </spring_coeff>
    <damping_coeff unit="LBS/FT/SEC"> 99200.00 </damping_coeff>
 </contact>

  <contact type="STRUCTURE" name="RUDDER_TIP">
    <location unit="M">
     <x>  26.776 </x>
     <y>  0.00 </y>
     <z>  12.9574 </z>
    </location>
    <static_friction>  0.80 </static_friction>
    <dynamic_friction> 0.50 </dynamic_friction>
    <spring_coeff unit="LBS/FT">      496000.00 </spring_coeff>
    <damping_coeff unit="LBS/FT/SEC"> 99200.00 </damping_coeff>
 </contact>

  <contact type="STRUCTURE" name="AFT_LOW_FUSELAGE">
    <location unit="M">
     <x>  17.71 </x>
     <y>  0.00 </y>
     <z> -0.83337 </z>
    </location>
    <static_friction>  0.80 </static_friction>
    <dynamic_friction> 0.50 </dynamic_friction>
    <spring_coeff unit="LBS/FT">      496000.00 </spring_coeff>
    <damping_coeff unit="LBS/FT/SEC"> 99200.00 </damping_coeff>
 </contact>

  <contact type="STRUCTURE" name="FUSELAGE_TAIL">
    <location unit="M">
     <x>  26.73 </x>
     <y>  0.00 </y>
     <z> 1.3364 </z>
    </location>
    <static_friction>  0.80 </static_friction>
    <dynamic_friction> 0.50 </dynamic_friction>
    <spring_coeff unit="LBS/FT">      496000.00 </spring_coeff>
    <damping_coeff unit="LBS/FT/SEC"> 99200.00 </damping_coeff>
 </contact>

  <contact type="STRUCTURE" name="TOP_ENGINE">
    <location unit="M">
     <x>  12.897 </x>
     <y>  0.000 </y>
     <z> 7.3864 </z>
    </location>
    <static_friction>  0.80 </static_friction>
    <dynamic_friction> 0.50 </dynamic_friction>
    <spring_coeff unit="LBS/FT">      496000.00 </spring_coeff>
    <damping_coeff unit="LBS/FT/SEC"> 99200.00 </damping_coeff>
 </contact>

 </ground_reactions>

 <propulsion>

   <engine file="RB211-524B">
    <location unit="M">
      <x> -1.542 </x>
      <y> -9.091 </y>
      <z> -1.4741 </z>
    </location>
    <orient unit="DEG">
      <pitch> 0.00 </pitch>
      <roll>   0.00 </roll>
      <yaw>   0.00 </yaw>
    </orient>
    <feed>1</feed>
    <thruster file="direct">
     <location unit="M">
      <x> 2.015 </x>
      <y> -9.091 </y>
      <z> -1.4741 </z>
     </location>
     <orient unit="DEG">
       <pitch> 0.00 </pitch>
       <roll>   0.00 </roll>
       <yaw>   0.00 </yaw>
     </orient>
    </thruster>
  </engine>

   <engine file="RB211-524B">
    <location unit="M">
       <x>  22.870 </x>
       <y>    0.00 </y>
       <z>  2.404 </z>
    </location>
    <orient unit="DEG">
      <pitch> 0.00 </pitch>
      <roll>   0.00 </roll>
      <yaw>   0.00 </yaw>
    </orient>
    <feed>0</feed>
    <feed>5</feed>
    <thruster file="direct">
     <location unit="M">
       <x>  27.870 </x>
       <y>    0.00 </y>
       <z>  2.404 </z>
     </location>
     <orient unit="DEG">
       <pitch> 0.00 </pitch>
       <roll>   0.00 </roll>
       <yaw>   0.00 </yaw>
     </orient>
    </thruster>
  </engine>

   <engine file="RB211-524B">
    <location unit="M">
      <x> -1.542 </x>
      <y> 9.091 </y>
      <z> -1.4741 </z>
    </location>
    <orient unit="DEG">
      <pitch> 0.00 </pitch>
      <roll>   0.00 </roll>
      <yaw>   0.00 </yaw>
    </orient>
    <feed>4</feed>
    <thruster file="direct">
     <location unit="M">
      <x> 2.015 </x>
      <y>  9.091 </y>
      <z> -1.4741 </z>
     </location>
     <orient unit="DEG">
       <pitch> 0.00 </pitch>
       <roll>   0.00 </roll>
       <yaw>   0.00 </yaw>
     </orient>
    </thruster>
  </engine>

  <tank type="FUEL" number="2L">
     <location unit="M">
       <x>    0.00 </x>
       <y> -10.214 </y>
       <z>    0.00 </z>
     </location>
     <capacity unit="LBS"> 15650.00 </capacity>
     <contents unit="LBS"> 15650.00 </contents>
  </tank>

  <tank type="FUEL" number="1">
     <location unit="M">
       <x>    0.00 </x>
       <y> -3.328.00 </y>
       <z>    0.00 </z>
     </location>
     <capacity unit="LBS"> 33970.00 </capacity>
     <contents unit="LBS"> 33970.00 </contents>
  </tank>

  <tank type="FUEL" number="1A">
     <location unit="M">
       <x>    0.00 </x>
       <y>    0.00 </y>
       <z>    0.00 </z>
     </location>
     <capacity unit="LBS"> 17200.00 </capacity>
     <contents unit="LBS"> 17200.00 </contents>
  </tank>

  <tank type="FUEL" number="3A">
     <location unit="M">
       <x>    0.00 </x>
       <y>    0.00 </y>
       <z>    0.00 </z>
     </location>
     <capacity unit="LBS"> 17200.00 </capacity>
     <contents unit="LBS"> 17200.00 </contents>
  </tank>

  <tank type="FUEL" number="3">
     <location unit="M">
       <x>    0.00 </x>
       <y>  3.328 </y>
       <z>    0.00 </z>
     </location>
     <capacity unit="LBS"> 33970.00 </capacity>
     <contents unit="LBS"> 33970.00 </contents>
  </tank>

  <tank type="FUEL" number="2R">
     <location unit="M">
       <x>    0.00 </x>
       <y>  10.214 </y>
       <z>    0.00 </z>
     </location>
     <capacity unit="LBS"> 15650.00 </capacity>
     <contents unit="LBS"> 15650.00 </contents>
  </tank>

 </propulsion>

 <system file="crash-detect"/>

 <flight_control name="FCS: L-1011-500">

  <channel name="Pitch">
   <summer name="Pitch Trim Sum">
      <input>fcs/elevator-cmd-norm</input>
      <input>fcs/pitch-trim-cmd-norm</input>
      <clipto>
        <min> -1 </min>
        <max>  1 </max>
      </clipto>
   </summer>

   <aerosurface_scale name="Elevator Control">
      <input>fcs/pitch-trim-sum</input>
      <range>
        <min> -0.23 </min>
        <max>  0.23 </max>
      </range>
      <output>fcs/elevator-pos-rad</output>
   </aerosurface_scale>

   <aerosurface_scale name="elevator position normalized">
      <input>fcs/elevator-pos-deg</input>
      <domain>
        <min> -28 </min>
        <max>  28 </max>
      </domain>
      <range>
        <min> -1 </min>
        <max>  1 </max>
      </range>
      <output>fcs/elevator-pos-norm</output>
   </aerosurface_scale>

      <aerosurface_scale name="Thrust Vectoring">
       <input>fcs/flap-pos-norm</input>
       <range>
        <min> 0.0 </min>
        <max> -0.105 </max>
       </range>
       <output>propulsion/engine[0]/pitch-angle-rad</output>
   </aerosurface_scale>

   <aerosurface_scale name="Thrust Vectoring">
       <input>fcs/flap-pos-norm</input>
       <range>
        <min> 0.0 </min>
        <max> -0.105 </max>
       </range>
       <output>propulsion/engine[2]/pitch-angle-rad</output>
    </aerosurface_scale>

  </channel>

  <channel name="Roll">
   <summer name="Roll Trim Sum">
      <input>fcs/aileron-cmd-norm</input>
      <input>fcs/roll-trim-cmd-norm</input>
      <clipto>
        <min> -1 </min>
        <max>  1 </max>
      </clipto>
   </summer>

   <aerosurface_scale name="Left Aileron Control">
      <input>fcs/roll-trim-sum</input>
      <range>
        <min> -0.35 </min>
        <max>  0.35 </max>
      </range>
      <output>fcs/left-aileron-pos-rad</output>
   </aerosurface_scale>

   <aerosurface_scale name="Right Aileron Control">
      <input>fcs/roll-trim-sum</input>
      <range>
        <min> -0.35 </min>
        <max>  0.35 </max>
      </range>
      <output>fcs/right-aileron-pos-rad</output>
   </aerosurface_scale>

   <aerosurface_scale name="left aileron normalization">
      <input>fcs/left-aileron-pos-rad</input>
      <domain>
        <min> -0.26 </min>
        <max>  0.26 </max>
      </domain>
      <range>
        <min> -1 </min>
        <max>  1 </max>
      </range>
      <output>fcs/left-aileron-pos-norm</output>
   </aerosurface_scale>

   <aerosurface_scale name="right aileron normalization">
      <input>fcs/right-aileron-pos-rad</input>
      <domain>
        <min> -0.26 </min>
        <max>  0.26 </max>
      </domain>
      <range>
        <min> -1 </min>
        <max>  1 </max>
      </range>
      <output>fcs/right-aileron-pos-norm</output>
   </aerosurface_scale>

  </channel>

  <channel name="Yaw">
   <summer name="Rudder Command Sum">
      <input>fcs/rudder-cmd-norm</input>
      <input>fcs/yaw-trim-cmd-norm</input>
      <clipto>
        <min> -0.35 </min>
        <max>  0.35 </max>
      </clipto>
   </summer>

   <scheduled_gain name="Yaw Damper Rate">
      <input>velocities/r-aero-rad_sec</input>
      <table>
        <independentVar lookup="row">velocities/ve-kts</independentVar>
         <tableData>
            30     0.00
            60     2.00
         </tableData>
      </table>
   </scheduled_gain>

   <scheduled_gain name="Yaw Damper Beta">
      <input>aero/beta-rad</input>
      <table>
        <independentVar lookup="row">velocities/ve-kts</independentVar>
        <tableData>
           30     0.00
           60     0.00
        </tableData>
      </table>
   </scheduled_gain>

   <summer name="Yaw Damper Sum">
      <input>fcs/yaw-damper-beta</input>
      <input>fcs/yaw-damper-rate</input>
      <clipto>
        <min> -0.1 </min>
        <max>  0.1 </max>
      </clipto>
   </summer>

   <scheduled_gain name="Yaw Damper Final">
      <input>fcs/yaw-damper-sum</input>
      <table>
        <independentVar lookup="row">velocities/ve-kts</independentVar>
        <tableData>
           30         0.0
           31         1.0
        </tableData>
      </table>
   </scheduled_gain>

   <summer name="Rudder Sum">
      <input>fcs/rudder-command-sum</input>
      <input>fcs/yaw-damper-final</input>
      <clipto>
        <min> -1 </min>
        <max>  1 </max>
      </clipto>
   </summer>

   <aerosurface_scale name="Rudder Control">
      <input>fcs/rudder-sum</input>
      <range>
        <min> -0.35 </min>
        <max>  0.35 </max>
      </range>
      <output>fcs/rudder-pos-rad</output>
   </aerosurface_scale>

   <aerosurface_scale name="rudder normalization">
      <input>fcs/rudder-pos-rad</input>
      <domain>
        <min> -0.35 </min>
        <max>  0.35 </max>
      </domain>
      <range>
        <min> -1 </min>
        <max>  1 </max>
      </range>
      <output>fcs/rudder-pos-norm</output>
   </aerosurface_scale>

  </channel>

  <channel name="Flaps">
   <kinematic name="Flaps Control">
     <input>fcs/flap-cmd-norm</input>
     <traverse>
       <setting>
          <position>  0 </position>
          <time>      0 </time>
       </setting>
       <setting>
          <position>  9 </position>
          <time>      4 </time>
       </setting>
       <setting>
          <position> 18 </position>
          <time>      4 </time>
       </setting>
       <setting>
          <position> 27 </position>
          <time>      4 </time>
       </setting>
       <setting>
          <position> 36 </position>
          <time>      4 </time>
       </setting>
     </traverse>
     <output>fcs/flap-pos-deg</output>
   </kinematic>

   <aerosurface_scale name="flap normalization">
      <input>fcs/flap-pos-deg</input>
      <domain>
        <min>  0 </min>
        <max> 36 </max>
      </domain>
      <range>
        <min> 0 </min>
        <max> 1 </max>
      </range>
      <output>fcs/flap-pos-norm</output>
   </aerosurface_scale>

  </channel>

  <channel name="Landing Gear">
   <kinematic name="Gear Control">
     <input>gear/gear-cmd-norm</input>
     <traverse>
       <setting>
          <position> 0 </position>
          <time>     0 </time>
       </setting>
       <setting>
          <position> 1 </position>
          <time>     8 </time>
       </setting>
     </traverse>
     <output>gear/gear-pos-norm</output>
   </kinematic>

  </channel>

  <channel name="Speedbrake">
   <kinematic name="Speedbrake Control">
     <input>fcs/speedbrake-cmd-norm</input>
     <traverse>
       <setting>
          <position> 0 </position>
          <time>     0 </time>
       </setting>
       <setting>
          <position> 1 </position>
          <time>     3 </time>
       </setting>
     </traverse>
     <output>fcs/speedbrake-pos-norm</output>
   </kinematic>

  </channel>

 </flight_control>

 <aerodynamics>

<alphalimits unit="DEG">
   <min>-8.0</min>
   <max>17.0</max>
  </alphalimits>

  <hysteresis_limits unit="DEG">
   <min> 15.0</min>
   <max>21.0</max>
  </hysteresis_limits>

 <function name="aero/function/ground-effect-factor-lift">
   <description>Change in lift due to ground effect factor</description>
   <product>
    <table>
     <independentVar lookup="row">aero/h_b-mac-ft</independentVar>
     <tableData>
        0.0  1.57
        0.1  1.447
        0.15 1.405
        0.2  1.303
        0.3  1.206
        0.4  1.085
        0.5  1.059
        0.6  1.03
        0.7  1.018
        0.8  1.006
        0.9  1.003
        1.0  1.002
        1.1  1.0
     </tableData>
    </table>
   </product>
  </function>

  <function name="aero/function/ground-effect-factor-drag">
   <description>Change in drag due to ground effect</description>
   <product>
    <table>
     <independentVar lookup="row">aero/h_b-mac-ft</independentVar>
     <tableData>
        0.0  0.580
        0.1  0.6015
        0.15 0.69
        0.2  0.759
        0.3  0.815
        0.4  0.882
        0.5  0.928
        0.6  0.962
        0.7  0.988
        0.8  1.0
        0.9  1.0
        1.0  1.0
        1.1  1.0
     </tableData>
    </table>
   </product>
  </function>

    <axis name="LIFT">

            <function name="aero/coefficient/CLalpha">
            <description>Lift_due_to_alpha</description>
            <product>
            <property>aero/qbar-psf</property>
            <property>metrics/Sw-sqft</property>
            <table>
            <independentVar lookup="row">aero/alpha-rad</independentVar>
                     <tableData>
                             -0.2000   -0.782
                             -0.157    -0.576
                             -0.107    -0.398
                             -0.0523   -0.192
                             -0.0350   -0.100
                             -0.0175   -0.049
                              0.0000   0.09
                              0.0175   0.22
                              0.0350   0.34
                              0.0523   0.48
                              0.1047   0.95
                              0.1396   1.14
                              0.1745   1.199
                              0.226    1.30
                              0.2617   1.240
                              0.3300   0.8250
                              0.56    0.2740
                          </tableData>
                       </table>
                      </product>
                    </function>

       <function name="aero/coefficient/dCLflap">
        <description>Delta_Lift_due_to_flaps</description>
        <product>
          <property>aero/qbar-psf</property>
          <property>metrics/Sw-sqft</property>
          <table>
            <independentVar>fcs/flap-pos-deg</independentVar>
            <tableData>
               0.0000  0.0000
              9.0000   0.170
              18.0000  0.250
              27.0000  0.390
              36.0000  0.4400
            </tableData>
          </table>
        </product>
      </function>

    <function name="aero/force/Lift_speedbrake">
       <description>Delta Lift due to speedbrake</description>
       <product>
           <property>aero/qbar-psf</property>
           <property>metrics/Sw-sqft</property>
           <property>fcs/speedbrake-pos-norm</property>
           <value>-0.069</value>
       </product>
    </function>

    <function name="aero/force/Lift_elevator">
       <description>Lift due to Elevator Deflection</description>
       <product>
           <property>aero/qbar-psf</property>
           <property>metrics/Sw-sqft</property>
           <property>fcs/elevator-pos-rad</property>
           <value>0.25</value>
       </product>
    </function>

  </axis>

  <axis name="DRAG">

    <function name="aero/force/Drag_basic">
       <description>Drag at zero lift</description>
       <product>
          <property>aero/qbar-psf</property>
          <property>metrics/Sw-sqft</property>
          <table>
            <independentVar lookup="row">aero/alpha-rad</independentVar>
                          <tableData>
                             -0.2000   0.0782
                             -0.157    0.04936
                             -0.107    0.0378
                             -0.0523   0.0242
                             -0.0350   0.0143
                             -0.0175   0.0106
                              0.0000   0.0118
                              0.0175   0.0138
                              0.0350   0.0151
                              0.0523   0.0190
                              0.0872   0.0246
                              0.1221   0.0304
                              0.1745   0.0509
                              0.2600   0.0940
                              0.3300   0.1950
                              0.6000   0.2740
                          </tableData>
          </table>
       </product>
    </function>

    <function name="aero/force/Drag_induced">
       <description>Induced drag</description>
         <product>
           <property>aero/qbar-psf</property>
           <property>metrics/Sw-sqft</property>
           <property>aero/cl-squared</property>
           <value>0.041</value>
         </product>
    </function>

    <function name="aero/force/Drag_mach">
       <description>Drag due to mach</description>
        <product>
          <property>aero/qbar-psf</property>
          <property>metrics/Sw-sqft</property>
          <table>
            <independentVar lookup="row">velocities/mach</independentVar>
            <tableData>
                0.00      0.000
                0.79      0.009
                1.10      0.014
                1.80      0.02
            </tableData>
          </table>
        </product>
    </function>

    <function name="aero/force/Drag_flap">
       <description>Drag due to flaps</description>
         <product>
           <property>aero/qbar-psf</property>
           <property>metrics/Sw-sqft</property>
           <property>fcs/flap-pos-deg</property>
           <value> 0.006 </value>
         </product>
    </function>

    <function name="aero/force/Drag_gear">
       <description>Drag due to gear</description>
         <product>
           <property>aero/qbar-psf</property>
           <property>metrics/Sw-sqft</property>
           <property>gear/gear-pos-norm</property>
           <value>0.019</value>
         </product>
    </function>

    <function name="aero/force/Drag_speedbrake">
       <description>Drag due to speedbrakes</description>
         <product>
           <property>aero/qbar-psf</property>
           <property>metrics/Sw-sqft</property>
           <property>fcs/speedbrake-pos-norm</property>
           <value>0.012</value>
         </product>
    </function>

    <function name="aero/force/Drag_beta">
       <description>Drag due to sideslip</description>
       <product>
          <property>aero/qbar-psf</property>
          <property>metrics/Sw-sqft</property>
          <table>
            <independentVar lookup="row">aero/beta-rad</independentVar>
            <tableData>
              -1.57       1.230
              -0.26    0.058
               0.00       0.000
               0.26    0.058
               1.57       1.230
            </tableData>
          </table>
       </product>
    </function>

    <function name="aero/force/Drag_elevator">
       <description>Drag due to Elevator Deflection</description>
       <product>
           <property>aero/qbar-psf</property>
           <property>metrics/Sw-sqft</property>
           <abs><property>fcs/elevator-pos-norm</property></abs>
           <value>0.01</value>
       </product>
    </function>

  </axis>

  <axis name="SIDE">

    <function name="aero/force/Side_beta">
       <description>Side force due to beta</description>
       <product>
           <property>aero/qbar-psf</property>
           <property>metrics/Sw-sqft</property>
           <property>aero/beta-rad</property>
           <value>-1.12</value>
       </product>
    </function>

  </axis>

  <axis name="ROLL">

    <function name="aero/moment/Roll_beta">
       <description>Roll moment due to beta</description>
       <product>
           <property>aero/qbar-psf</property>
           <property>metrics/Sw-sqft</property>
           <property>metrics/bw-ft</property>
           <property>aero/beta-rad</property>
           <value>-0.09</value>
       </product>
    </function>

    <function name="aero/moment/Roll_damp">
       <description>Roll moment due to roll rate</description>
       <product>
           <property>aero/qbar-psf</property>
           <property>metrics/Sw-sqft</property>
           <property>metrics/bw-ft</property>
           <property>aero/bi2vel</property>
           <property>velocities/p-aero-rad_sec</property>
           <value>-0.47</value>
       </product>
    </function>

    <function name="aero/moment/Roll_yaw">
       <description>Roll moment due to yaw rate</description>
       <product>
           <property>aero/qbar-psf</property>
           <property>metrics/Sw-sqft</property>
           <property>metrics/bw-ft</property>
           <property>aero/bi2vel</property>
           <property>velocities/r-aero-rad_sec</property>
           <value>0.009</value>
       </product>
    </function>

    <function name="aero/moment/Roll_aileron">
       <description>Roll moment due to aileron</description>
       <product>
          <property>aero/qbar-psf</property>
          <property>metrics/Sw-sqft</property>
          <property>metrics/bw-ft</property>
          <property>fcs/left-aileron-pos-rad</property>
          <table>
            <independentVar lookup="row">velocities/mach</independentVar>
            <tableData>
              0.0    0.100
              2.0    0.033
            </tableData>
          </table>
       </product>
    </function>

    <function name="aero/moment/Roll_rudder">
       <description>Roll moment due to rudder</description>
       <product>
           <property>aero/qbar-psf</property>
           <property>metrics/Sw-sqft</property>
           <property>metrics/bw-ft</property>
           <property>fcs/rudder-pos-rad</property>
           <value>-0.019</value>
       </product>
    </function>

  </axis>

  <axis name="PITCH">


    <function name="aero/coefficient/Cmflap">
                <description>Pitch_moment_due_to_flaps</description>
                <product>
                    <property>aero/qbar-psf</property>
                    <property>metrics/Sw-sqft</property>
                    <property>metrics/cbarw-ft</property>
                    <property>fcs/flap-pos-norm</property>
                    <value>-0.007</value>
                </product>
            </function>

      <function name="aero/coefficient/Cmgear">
        <description>Pitch_moment_due_to_gear</description>
                <product>
                    <property>aero/qbar-psf</property>
                    <property>metrics/Sw-sqft</property>
                    <property>metrics/cbarw-ft</property>
                    <property>gear/gear-pos-norm</property>
                    <value>-0.0031</value>
                </product>
            </function>

    <function name="aero/moment/Pitch_alpha">
       <description>Pitch moment due to alpha</description>
       <product>
           <property>aero/qbar-psf</property>
           <property>metrics/Sw-sqft</property>
           <property>metrics/cbarw-ft</property>
           <property>aero/alpha-rad</property>
           <value>-0.40</value>
       </product>
    </function>

    <function name="aero/moment/Pitch_elevator">
       <description>Pitch moment due to elevator</description>
       <product>
          <property>aero/qbar-psf</property>
          <property>metrics/Sw-sqft</property>
          <property>metrics/cbarw-ft</property>
          <property>fcs/elevator-pos-rad</property>
          <table>
            <independentVar lookup="row">velocities/mach</independentVar>
            <tableData>
              0.0     -1.50
              2.0     -0.200
            </tableData>
          </table>
       </product>
    </function>

    <function name="aero/moment/Pitch_damp">
       <description>Pitch moment due to pitch rate</description>
       <product>
           <property>aero/qbar-psf</property>
           <property>metrics/Sw-sqft</property>
           <property>metrics/cbarw-ft</property>
           <property>aero/ci2vel</property>
           <property>velocities/q-aero-rad_sec</property>
           <value>-28</value>
       </product>
    </function>

    <function name="aero/moment/Pitch_alphadot">
       <description>Pitch moment due to alpha rate</description>
       <product>
           <property>aero/qbar-psf</property>
           <property>metrics/Sw-sqft</property>
           <property>metrics/cbarw-ft</property>
           <property>aero/ci2vel</property>
           <property>aero/alphadot-rad_sec</property>
           <value>-4</value>
       </product>
    </function>

    <function name="aero/coefficient/CXa">
                <description>Pitch_force_due_to_alpha</description>
                <product>
                    <property>aero/qbar-psf</property>
                    <property>metrics/Sw-sqft</property>
                    <property>aero/alpha-rad</property>
                    <value>-0.8</value>
                </product>
            </function>

  </axis>

  <axis name="YAW">

    <function name="aero/moment/Yaw_beta">
       <description>Yaw moment due to beta</description>
       <product>
           <property>aero/qbar-psf</property>
           <property>metrics/Sw-sqft</property>
           <property>metrics/bw-ft</property>
           <property>aero/beta-rad</property>
           <value>0.12</value>
       </product>
    </function>

    <function name="aero/moment/Yaw_damp">
       <description>Yaw moment due to yaw rate</description>
       <product>
           <property>aero/qbar-psf</property>
           <property>metrics/Sw-sqft</property>
           <property>metrics/bw-ft</property>
           <property>aero/bi2vel</property>
           <property>velocities/r-aero-rad_sec</property>
           <value>-0.15</value>
       </product>
    </function>

    <function name="aero/moment/Yaw_rudder">
       <description>Yaw moment due to rudder</description>
       <product>
           <property>aero/qbar-psf</property>
           <property>metrics/Sw-sqft</property>
           <property>metrics/bw-ft</property>
           <property>fcs/rudder-pos-rad</property>
           <value>-0.1</value>
       </product>
    </function>

    <function name="aero/moment/Yaw_aileron">
       <description>Adverse yaw</description>
       <product>
           <property>aero/qbar-psf</property>
           <property>metrics/Sw-sqft</property>
           <property>metrics/bw-ft</property>
           <property>fcs/left-aileron-pos-rad</property>
           <value>-0.013</value>
       </product>
    </function>

  </axis>

 </aerodynamics>

</fdm_config>
